// SBML level 3 version 2

model ferroptosis_core_single_cell()

  // Compartments:
  compartment default_compartment = 1;

  // Species:
  species LP in default_compartment = 0;
  species GSH in default_compartment = 4;
  species GPX4 in default_compartment = 0.08;

  // Parameters:
  total_ros = 0.556;
  eff_unsat = 1.6;
  fsp1 = 1;
  nrf2 = 1.2;
  gsh_km = 2;
  gsh_scav_efficiency = 0.5;
  nrf2_gsh_rate = 0.025;
  gsh_max = 12;
  lp_rate = 0.06;
  lp_propagation = 0.1;
  gpx4_rate = 0.3;
  fsp1_rate = 0.08;
  gpx4_degradation_by_ros = 0.002;
  gpx4_nrf2_upregulation = 0.008;
  gpx4_nrf2_target = nrf2*1;

  // Assignment rules:
  scavenged := total_ros*gsh_scav_efficiency*(GSH/(GSH + gsh_km));
  deficit := max(0, (gsh_max - GSH)/gsh_max);
  unscav := max(0, total_ros - scavenged);
  quench := GPX4*(GSH/(GSH + 0.5)) + fsp1;
  prop_rate := lp_propagation/(1 + quench*5);
  lp_gen := unscav*eff_unsat*lp_rate + LP*eff_unsat*prop_rate;
  lp_repair := GPX4*(GSH/(GSH + 1))*gpx4_rate*(LP/(LP + 0.5)) + fsp1*fsp1_rate*(LP/(LP + 0.5));

  // Rate rules:
  LP' = lp_gen - lp_repair;
  GSH' = -scavenged*0.5 + nrf2*nrf2_gsh_rate*deficit;
  GPX4' = -gpx4_degradation_by_ros*max(0, total_ros - 1) + gpx4_nrf2_upregulation*(gpx4_nrf2_target - GPX4);
end
